*Heading
** Job name: Job-1-HeatConductionFlipChip Model name: Model-1
** Generated by: Abaqus/CAE Learning Edition 2025
*Preprint, echo=NO, model=NO, history=NO, contact=NO
**
** PARTS
**
*Part, name=FlipChip
*Node
      1,  -0.67272079,   0.67272079,           1.
      2,  0.927279234, -0.677279234,           1.
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*Element, type=DC3D8
  1,  26, 109,  28,  27, 203, 224, 205, 204
  2,  30,  29,  28, 109, 207, 206, 205, 224
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*Nset, nset=Set-1
   1,   2,   3,   4,   5,   6
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*Elset, elset=Set-1, generate
   1,  124,    1
*Nset, nset=Set-2
   1,   2,   3,   4,   5,   6
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*Elset, elset=Set-2, generate
 125,  212,    1
*Nset, nset=Set-3
  15,  16,  17,  18,  19,  20
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*Elset, elset=Set-3, generate
 213,  308,    1
** Section: HSsection
*Solid Section, elset=Set-1, material=CuHS
,
** Section: STIMsection
*Solid Section, elset=Set-2, material=STIM
,
** Section: chipsection
*Solid Section, elset=Set-3, material=SiliconChip
,
*End Part
**
**
** ASSEMBLY
**
*Assembly, name=Assembly
**
*Instance, name=FlipChip-1, part=FlipChip
*End Instance
**
*Nset, nset=Set-1, instance=FlipChip-1
  21,  22,  23,  24, 101, 102
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*Elset, elset=Set-1, instance=FlipChip-1, generate
 213,  308,    1
*Nset, nset=Set-2, instance=FlipChip-1
  11,  12,  13,  14,  63,  64
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*Elset, elset=Set-2, instance=FlipChip-1, generate
   1,  124,    1
*End Assembly
**
** MATERIALS
**
*Material, name=CuHS
*Conductivity
 0.401,
*Density
 8.96e-06,
*Specific Heat
380.,
*Material, name=STIM
*Conductivity
 0.0578,
*Density
 8.41e-06,
*Specific Heat
 8.41e-06,
*Material, name=SiliconChip
*Conductivity
 0.11,
*Density
 2.32e-06,
*Specific Heat
700.,
** ----------------------------------------------------------------
**
** STEP: conduction
**
*Step, name=conduction, nlgeom=NO
*Heat Transfer, end=PERIOD, deltmx=300.
1., 1., 1e-05, 1.,
**
** BOUNDARY CONDITIONS
**
** Name: HeatSinking Type: Temperature
*Boundary
Set-2, 11, 11, 20.
** Name: TemperatureSource Type: Temperature
*Boundary
Set-1, 11, 11, 85.
**
** OUTPUT REQUESTS
**
*Restart, write, frequency=0
**
** FIELD OUTPUT: F-Output-1
**
*Output, field, variable=PRESELECT
**
** HISTORY OUTPUT: H-Output-1
**
*Output, history
*Radiation Output, variable=ALL
*Contact Output
HFLA, HTL, HTLA, SJD, SJDA, SJDE, SJDEA, SJDET, SJDETA, SJDR, SJDRA, SJDRT, SJDRTA, SJDT, SJDTA, WEIGHT
*End Step
