*Heading
** Job name: Job-1 Model name: Model-1
** Generated by: Abaqus/CAE Learning Edition 2025
*Preprint, echo=NO, model=NO, history=NO, contact=NO
**
** PARTS
**
*Part, name=Part-1
*End Part
**
**
** ASSEMBLY
**
*Assembly, name=Assembly
**
*Instance, name=Part-1-1, part=Part-1
*Node
      1,   35.1315689,  0.980958343,           0.
      2,   35.0956993,  -19.0190411,           0.
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*Element, type=S4R
  1,   1,  45, 153,  59
  2,  45,  46, 154, 153
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*Element, type=S3
210, 183, 188, 187
211, 223, 225, 224
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*Nset, nset=Set-1, generate
   1,  261,    1
*Elset, elset=Set-1, generate
   1,  219,    1
** Section: Section-1
*Shell Section, elset=Set-1, material=Material-1
5., 5
*End Instance
**
*Instance, name=Part-1-2, part=Part-1
*Node
      1,   35.1315689,  0.980958343,           0.
      2,   35.0956993,  -19.0190411,           0.
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*Element, type=S4R
  1,   1,  45, 153,  59
  2,  45,  46, 154, 153
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*Element, type=S3
210, 183, 188, 187
211, 223, 225, 224
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*Nset, nset=Set-1, generate
   1,  261,    1
*Elset, elset=Set-1, generate
   1,  219,    1
** Section: Section-1
*Shell Section, elset=Set-1, material=Material-1
5., 5
*End Instance
**
*Nset, nset=Set-1, instance=Part-1-2
  13,  14,  15,  22,  23,  32,  97,  98, 116, 135
*Elset, elset=Set-1, instance=Part-1-2
 101, 102, 103, 115, 137, 140, 141, 163, 164, 165
*Elset, elset=_Surf-1_E2, internal, instance=Part-1-2
 152, 172, 174, 181, 194
*Elset, elset=_Surf-1_E1, internal, instance=Part-1-2
 153, 182, 198, 199
*Elset, elset=_Surf-1_E3, internal, instance=Part-1-2
 189,
*Elset, elset=_Surf-1_E4, internal, instance=Part-1-2
 207,
*Surface, type=ELEMENT, name=Surf-1
_Surf-1_E2, E2
_Surf-1_E1, E1
_Surf-1_E4, E4
_Surf-1_E3, E3
*Elset, elset=_Surf-2_E4, internal, instance=Part-1-2
 171, 173
*Elset, elset=_Surf-2_E1, internal, instance=Part-1-2
 185, 187
*Elset, elset=_Surf-2_E3, internal, instance=Part-1-2, generate
 202,  204,    1
*Elset, elset=_Surf-2_E2, internal, instance=Part-1-2
 206, 209
*Surface, type=ELEMENT, name=Surf-2
_Surf-2_E4, E4
_Surf-2_E1, E1
_Surf-2_E2, E2
_Surf-2_E3, E3
*End Assembly
**
** MATERIALS
**
*Material, name=Material-1
*Elastic
210000., 0.3
** ----------------------------------------------------------------
**
** STEP: Step-1
**
*Step, name=Step-1, nlgeom=NO
*Static
1., 1., 1e-05, 1.
**
** BOUNDARY CONDITIONS
**
** Name: BC-1 Type: Symmetry/Antisymmetry/Encastre
*Boundary
Set-1, ENCASTRE
**
** LOADS
**
** Name: Load-1   Type: Shell edge load
*Dsload
Surf-2, EDNOR, -50.
**
** OUTPUT REQUESTS
**
*Restart, write, frequency=0
**
** FIELD OUTPUT: F-Output-1
**
*Output, field, variable=PRESELECT
**
** HISTORY OUTPUT: H-Output-1
**
*Output, history, variable=PRESELECT
*End Step
