*Heading
** Job name: Job-1-composite-layup Model name: Model-1
** Generated by: Abaqus/CAE Learning Edition 2025
*Preprint, echo=NO, model=NO, history=NO, contact=NO
**
** PARTS
**
*Part, name=Part-1
*Node
      1,          40.,          50.,           0.
      2,          35.,          50.,           0.
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*Element, type=S4R
  1,   1,   2,  29,  28
  2,   2,   3,  30,  29
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*Orientation, name=Ori-1
1., 0., 0., 0., 1., 0.
3, 0.
** Region: (CompositeLayup-1-1: Generated From Layup)
*Elset, elset=CompositeLayup-1-1, generate
   1,  312,    1
** Section: CompositeLayup-1-1
*Shell Section, elset=CompositeLayup-1-1, composite, orientation=Ori-1, layup=CompositeLayup-1, symmetric
0.3, 3, Material-1, 0., Ply-1
0.3, 3, Material-1, 45., Ply-2
0.3, 3, Material-1, -45., Ply-3
*End Part
**
**
** ASSEMBLY
**
*Assembly, name=Assembly
**
*Instance, name=Part-1-1, part=Part-1
*End Instance
**
*Nset, nset=Set-1, instance=Part-1-1, generate
  27,  351,   27
*Elset, elset=Set-1, instance=Part-1-1, generate
  26,  312,   26
*Nset, nset=Set-2, instance=Part-1-1, generate
   1,  325,   27
*Elset, elset=Set-2, instance=Part-1-1, generate
   1,  287,   26
*Elset, elset=_Surf-1_E4, internal, instance=Part-1-1, generate
   1,  287,   26
*Surface, type=ELEMENT, name=Surf-1
_Surf-1_E4, E4
*End Assembly
**
** MATERIALS
**
*Material, name=Material-1
*Elastic, type=ENGINEERING CONSTANTS
138000.,9500.,9500., 0.28, 0.28,  0.4,5200.,5200.
1450.,
** ----------------------------------------------------------------
**
** STEP: Step-1
**
*Step, name=Step-1, nlgeom=NO
*Static
1., 1., 1e-05, 1.
**
** BOUNDARY CONDITIONS
**
** Name: BC-1 Type: Symmetry/Antisymmetry/Encastre
*Boundary
Set-1, ENCASTRE
** Name: BC-2 Type: Displacement/Rotation
*Boundary
Set-2, 2, 2
Set-2, 3, 3
Set-2, 4, 4
Set-2, 5, 5
Set-2, 6, 6
**
** LOADS
**
** Name: Load-1   Type: Shell edge load
*Dsload
Surf-1, EDNOR, 100.
**
** OUTPUT REQUESTS
**
*Restart, write, frequency=0
**
** FIELD OUTPUT: F-Output-1
**
*Output, field, variable=PRESELECT
**
** HISTORY OUTPUT: H-Output-1
**
*Output, history, variable=PRESELECT
*End Step
