*Heading
** Job name: Job-1-beam Model name: Model-1
** Generated by: Abaqus/CAE Learning Edition 2025
*Preprint, echo=NO, model=NO, history=NO, contact=NO
**
** PARTS
**
*Part, name=Beam
*Node
      1,         -10.,          25.,           0.
      2,         -35.,          25.,           0.
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*Element, type=C3D8R
  1,  32,  16,   2,  14,  69,  53,  39,  51
  2,  13,  15,  16,  32,  50,  52,  53,  69
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*Nset, nset=Set-1, generate
   1,  777,    1
*Elset, elset=Set-1, generate
   1,  400,    1
** Section: Section-1
*Solid Section, elset=Set-1, material=Material-1
,
*End Part
**
**
** ASSEMBLY
**
*Assembly, name=Assembly
**
*Instance, name=Beam-1, part=Beam
*End Instance
**
*Nset, nset=Set-1, instance=Beam-1, generate
  1,  37,   1
*Elset, elset=Set-1, instance=Beam-1, generate
  1,  20,   1
*Nset, nset=Set-2, instance=Beam-1
 741,
*Elset, elset=_Surf-1_S4, internal, instance=Beam-1
   1,   2,  11,  21,  22,  31
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*Elset, elset=_Surf-1_S5, internal, instance=Beam-1
   3,   4,  23,  24,  43,  44
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*Elset, elset=_Surf-1_S3, internal, instance=Beam-1, generate
  12,  392,   20
*Surface, type=ELEMENT, name=Surf-1
_Surf-1_S4, S4
_Surf-1_S5, S5
_Surf-1_S3, S3
*End Assembly
**
** MATERIALS
**
*Material, name=Material-1
*Elastic
70000., 0.3
** ----------------------------------------------------------------
**
** STEP: Step-1
**
*Step, name=Step-1, nlgeom=NO
*Static
1., 1., 1e-05, 1.
**
** BOUNDARY CONDITIONS
**
** Name: BC-1 Type: Symmetry/Antisymmetry/Encastre
*Boundary
Set-1, ENCASTRE
**
** LOADS
**
** Name: force_side   Type: Concentrated force
*Cload
Set-2, 1, 0.
Set-2, 2, 0.
Set-2, 3, 200.
** Name: pressure_top   Type: Pressure
*Dsload
Surf-1, P, 100.
**
** OUTPUT REQUESTS
**
*Restart, write, frequency=0
**
** FIELD OUTPUT: F-Output-1
**
*Output, field, variable=PRESELECT
**
** HISTORY OUTPUT: H-Output-1
**
*Output, history, variable=PRESELECT
*End Step
