*Heading
** Job name: Job-1-fin-heat-transfer Model name: Model-1
** Generated by: Abaqus/CAE Learning Edition 2025
*Preprint, echo=NO, model=NO, history=NO, contact=NO
**
** PARTS
**
*Part, name=Fin
*Node
      1,  -14.8912506,           0.,           0.
      2,  -19.8912506,           0.,           0.
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*Element, type=DC3D8
  1,  32,  27,   2,   1, 136, 131, 106, 105
  2,  31,  28,  27,  32, 135, 132, 131, 136
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*Nset, nset=Set-1, generate
   1,  520,    1
*Elset, elset=Set-1, generate
   1,  264,    1
** Section: Section-1
*Solid Section, elset=Set-1, material=Material-1
,
*End Part
**
**
** ASSEMBLY
**
*Assembly, name=Assembly
**
*Instance, name=Fin-1, part=Fin
*End Instance
**
*Nset, nset=Set-1, instance=Fin-1
   6,   7,   8,  35,  36,  37
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*Elset, elset=Set-1, instance=Fin-1
   7,  10,  13,  16,  19,  22
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*Nset, nset=Set-2, instance=Fin-1, generate
   1,  520,    1
*Elset, elset=Set-2, instance=Fin-1, generate
   1,  264,    1
*End Assembly
**
** MATERIALS
**
*Material, name=Material-1
*Conductivity
44.,
** ----------------------------------------------------------------
**
** STEP: Step-1
**
*Step, name=Step-1, nlgeom=NO
*Heat Transfer, steady state, deltmx=0.
1., 1., 1e-05, 1.,
**
** BOUNDARY CONDITIONS
**
** Name: BC-1 Type: Temperature
*Boundary
Set-1, 11, 11, 400.
**
** LOADS
**
** Name: Load-1   Type: Body heat flux
*Dflux
Set-2, BF, 20.
**
** OUTPUT REQUESTS
**
*Restart, write, frequency=0
**
** FIELD OUTPUT: F-Output-1
**
*Output, field, variable=PRESELECT
**
** HISTORY OUTPUT: H-Output-1
**
*Output, history
*Radiation Output
FTEMP,
*End Step
