*Heading
** Job name: Job-1-crack Model name: Model-1
** Generated by: Abaqus/CAE Learning Edition 2025
*Preprint, echo=NO, model=NO, history=NO, contact=NO
**
** PARTS
**
*Part, name=Part-1
*End Part
**
**
** ASSEMBLY
**
*Assembly, name=Assembly
**
*Instance, name=Part-1-1, part=Part-1
*Node
      1,          25.,          25.
      2,         -25.,          25.
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*Element, type=CPS3
1, 117, 109, 135
2,  81,  35,  78
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*Element, type=CPS4R
  6, 137, 136, 101,  95
  7,  69,  20,  21,  86
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*Nset, nset=Set-1, generate
   1,  152,    1
*Elset, elset=Set-1, generate
   1,  136,    1
** Section: Section-1
*Solid Section, elset=Set-1, material=Material-1
,
*End Instance
**
*Instance, name=Part-1-2, part=Part-1
*Node
      1,          25.,          25.
      2,         -25.,          25.
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*Element, type=CPS3
1, 119, 109, 135
2,  83,  36,  80
3, 146, 107, 124
4, 127, 122, 142
5, 134, 122, 121
116, 148,  61,  62
117, 149,  59,  60
118, 151,  11,  57
*Element, type=CPS4R
  6, 137, 136, 101,  95
  7,  69,  21,  22,  87
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*Nset, nset=Set-1, generate
   1,  158,    1
*Elset, elset=Set-1, generate
   1,  136,    1
** Section: Section-1
*Solid Section, elset=Set-1, material=Material-1
,
*End Instance
**
*Nset, nset=Set-1, instance=Part-1-2
 8,
*Nset, nset=Set-6, instance=Part-1-2
   3,   4,   9,  10,  25,  26,  27, 153, 154, 155, 156, 157, 158
*Elset, elset=Set-6, instance=Part-1-2
   9,  23,  24,  25,  33,  35,  36,  38, 119, 126, 134, 136
*Nset, nset=_PickedSet10, internal, instance=Part-1-2
   9,  10, 153
*Elset, elset=_PickedSet10, internal, instance=Part-1-2
 119, 136
*Nset, nset=_PickedSet11, internal, instance=Part-1-2
 9,
*Elset, elset=_Surf-1_S4, internal, instance=Part-1-2
 11, 26, 28, 50, 59
*Elset, elset=_Surf-1_S3, internal, instance=Part-1-2
 31,
*Elset, elset=_Surf-1_S2, internal, instance=Part-1-2
 52, 57, 58, 61
*Surface, type=ELEMENT, name=Surf-1
_Surf-1_S4, S4
_Surf-1_S3, S3
_Surf-1_S2, S2
*Elset, elset=_Surf-2_S3, internal, instance=Part-1-2
 18, 46
*Elset, elset=_Surf-2_S2, internal, instance=Part-1-2
 19,
*Elset, elset=_Surf-2_S4, internal, instance=Part-1-2
 20, 21, 40, 41, 43, 44, 68
*Surface, type=ELEMENT, name=Surf-2
_Surf-2_S3, S3
_Surf-2_S2, S2
_Surf-2_S4, S4
*End Assembly
**
** MATERIALS
**
*Material, name=Material-1
*Elastic
207000., 0.3
** ----------------------------------------------------------------
**
** STEP: Step-1
**
*Step, name=Step-1, nlgeom=NO
*Static
1., 1., 1e-05, 1.
**
** BOUNDARY CONDITIONS
**
** Name: BC-1 Type: Displacement/Rotation
*Boundary
Set-1, 1, 1
Set-1, 2, 2
Set-1, 6, 6
**
** LOADS
**
** Name: Load-1   Type: Pressure
*Dsload
Surf-1, P, -200.
** Name: Load-2   Type: Pressure
*Dsload
Surf-2, P, -200.
**
** OUTPUT REQUESTS
**
*Restart, write, frequency=0
**
** FIELD OUTPUT: F-Output-1
**
*Output, field, variable=PRESELECT
**
** HISTORY OUTPUT: H-Output-1
**
*Output, history, variable=PRESELECT
*End Step
