*Heading
** Job name: Job-1-bimetallic Model name: Model-1
** Generated by: Abaqus/CAE Learning Edition 2025
*Preprint, echo=NO, model=NO, history=NO, contact=NO
**
** PARTS
**
*Part, name="bimetallic strip"
*Node
      1,          20.,          0.5
      2,           0.,          0.5
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*Element, type=CPS4R
  1,   1,   7, 162, 108
  2,   7,   8, 163, 162
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*Nset, nset=Set-1
   1,   2,   5,   6,   7,   8
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*Elset, elset=Set-1, generate
 151,  300,    1
*Nset, nset=Set-2
   1,   2,   3,   4,   7,   8
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*Elset, elset=Set-2, generate
   1,  150,    1
** Section: iron
*Solid Section, elset=Set-2, material=iron
,
** Section: brass
*Solid Section, elset=Set-1, material=brass
,
*End Part
**
**
** ASSEMBLY
**
*Assembly, name=Assembly
**
*Instance, name="bimetallic strip-1", part="bimetallic strip"
*End Instance
**
*Nset, nset=Set-1, instance="bimetallic strip-1"
   2,   3,   6,  56,  57, 160, 161
*Elset, elset=Set-1, instance="bimetallic strip-1"
  50, 100, 150, 151, 201, 251
*Nset, nset=Set-2, instance="bimetallic strip-1", generate
   1,  357,    1
*Elset, elset=Set-2, instance="bimetallic strip-1", generate
   1,  300,    1
*End Assembly
**
** MATERIALS
**
*Material, name=brass
*Elastic
100000., 0.33
*Expansion
19.,
*Material, name=iron
*Elastic
200000., 0.3
*Expansion
12.,
**
** PREDEFINED FIELDS
**
** Name: Predefined Field-1   Type: Temperature
*Initial Conditions, type=TEMPERATURE
Set-2, 300.
** ----------------------------------------------------------------
**
** STEP: Step-1
**
*Step, name=Step-1, nlgeom=NO
*Static
1., 1., 1e-05, 1.
**
** BOUNDARY CONDITIONS
**
** Name: BC-1 Type: Displacement/Rotation
*Boundary
Set-1, 1, 1
Set-1, 2, 2
**
** PREDEFINED FIELDS
**
** Name: Predefined Field-1   Type: Temperature
*Temperature
Set-2, 600.
**
** OUTPUT REQUESTS
**
*Restart, write, frequency=0
**
** FIELD OUTPUT: F-Output-1
**
*Output, field, variable=PRESELECT
**
** HISTORY OUTPUT: H-Output-1
**
*Output, history, variable=PRESELECT
*End Step
