*Heading
** Job name: Job-1-contact-press Model name: Model-1
** Generated by: Abaqus/CAE Learning Edition 2025
*Preprint, echo=NO, model=NO, history=NO, contact=NO
**
** PARTS
**
*Part, name=Part-1
*Node
      1,          24.,         -14.,          10.
      2,          12.,         -14.,          10.
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*Element, type=C3D8R
1,   1,  61,   3,   2,  11,  64,   9,  10
2,  61,   1, 177,   4,  64,  11, 179,  16
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*Nset, nset=Set-1, generate
   1,  260,    1
*Elset, elset=Set-1, generate
   1,  144,    1
** Section: Section-1
*Solid Section, elset=Set-1, material=Material-1
,
*End Part
**
*Part, name=Part-2
*Node
      1,   6.94941711,   31.1599998,          26.
      2,   6.94941711,   24.1599998,          26.
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*Element, type=R3D4
1,  1,  2, 15, 22
2, 22, 15, 16, 21
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*End Part
**
**
** ASSEMBLY
**
*Assembly, name=Assembly
**
*Instance, name=Part-1-1, part=Part-1
*End Instance
**
*Instance, name=Part-2-1, part=Part-2
-0.999999566717076,    -1.366227, 51.6720334332829
-0.999999566717076,    -1.366227, 51.6720334332829, -0.999999566717076,    -0.366227, 51.6720334332829,          90.
*End Instance
**
*Node
      1,          12.,  -1.36622703,   51.6720352
*Nset, nset=Set-3, instance=Part-1-1
   6,  14,  22,  29,  37,  42
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*Elset, elset=Set-3, instance=Part-1-1
  75,  78,  81,  84,  87,  90
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*Nset, nset=Set-4, instance=Part-1-1
  17,  18,  19,  20,  21,  22
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*Nset, nset=Set-4
 1,
*Elset, elset=Set-4, instance=Part-1-1
  31,  32,  33,  34,  35,  36
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*Nset, nset=Set-5, instance=Part-1-1
   3,   4,  31,  32,  45,  54,  61, 132, 153, 174
*Elset, elset=Set-5, instance=Part-1-1
   1,   2,   7,   8,  61,  62,  67,  68,  97,  98, 103, 104, 133, 134, 139, 140
*Nset, nset=Set-6
 1,
*Nset, nset=b_Set-1, instance=Part-2-1, generate
   1,  102,    1
*Elset, elset=b_Set-1, instance=Part-2-1, generate
  1,  80,   1
*Nset, nset=_PickedSet12, internal
 1,
*Elset, elset=_CP-1-Part-1-1_S3, internal, instance=Part-1-1
   3,  11,  17,  23,  29,  35
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*Elset, elset=_CP-1-Part-1-1_S6, internal, instance=Part-1-1
   5,   9,  15,  21,  27,  33
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*Elset, elset=_CP-1-Part-1-1_S5, internal, instance=Part-1-1, generate
 114,  144,    6
*Elset, elset=_CP-1-Part-1-1_S4, internal, instance=Part-1-1, generate
  78,  108,    6
*Surface, type=ELEMENT, name=CP-1-Part-1-1
_CP-1-Part-1-1_S3, S3
_CP-1-Part-1-1_S6, S6
_CP-1-Part-1-1_S4, S4
_CP-1-Part-1-1_S5, S5
*Elset, elset=_CP-1-Part-2-1_SPOS, internal, instance=Part-2-1, generate
  1,  80,   1
*Surface, type=ELEMENT, name=CP-1-Part-2-1
_CP-1-Part-2-1_SPOS, SPOS
** Constraint: Constraint-1
*Rigid Body, ref node=_PickedSet12, elset=b_Set-1
*Elset, elset=__CP-1-Part-2-1-Part-1-1_msm_3_SPOS, internal, instance=Part-2-1, generate
 31,  50,   1
*Surface, type=ELEMENT, name=_CP-1-Part-2-1-Part-1-1_msm_3, internal
__CP-1-Part-2-1-Part-1-1_msm_3_SPOS, SPOS
*End Assembly
**
** MATERIALS
**
*Material, name=Material-1
*Elastic
210000., 0.3
**
** INTERACTION PROPERTIES
**
*Surface Interaction, name=IntProp-1
1.,
*Friction
0.,
*Surface Behavior, pressure-overclosure=HARD
*Surface Smoothing, name=CP-1-Part-2-1-Part-1-1
, _CP-1-Part-2-1-Part-1-1_msm_3, CIRCUMFERENTIAL, -1., -1.36623, 51.672, 4.33283e-07, -1.36623, 51.672
**
** INTERACTIONS
**
** Interaction: CP-1-Part-2-1-Part-1-1
*Contact Pair, interaction=IntProp-1, type=SURFACE TO SURFACE, adjust=0.0, geometric correction=CP-1-Part-2-1-Part-1-1
CP-1-Part-1-1, CP-1-Part-2-1
** ----------------------------------------------------------------
**
** STEP: Step-1
**
*Step, name=Step-1, nlgeom=NO
*Static
1., 1., 1e-05, 1.
**
** BOUNDARY CONDITIONS
**
** Name: BC-1 Type: Displacement/Rotation
*Boundary
Set-3, 1, 1
** Name: BC-2 Type: Displacement/Rotation
*Boundary
Set-4, 3, 3
** Name: BC-3 Type: Displacement/Rotation
*Boundary
Set-5, 2, 2
** Name: BC-4 Type: Displacement/Rotation
*Boundary
Set-6, 1, 1
Set-6, 2, 2, -1.
Set-6, 3, 3
Set-6, 4, 4
Set-6, 5, 5
Set-6, 6, 6
**
** OUTPUT REQUESTS
**
*Restart, write, frequency=0
**
** FIELD OUTPUT: F-Output-1
**
*Output, field, variable=PRESELECT
**
** HISTORY OUTPUT: H-Output-1
**
*Output, history, variable=PRESELECT
*End Step
