*Heading
** Job name: Job-1-nonlinear-analysis Model name: Model-1
** Generated by: Abaqus/CAE Learning Edition 2025
*Preprint, echo=NO, model=NO, history=NO, contact=NO
**
** PARTS
**
*Part, name=Part-1
*End Part
**
**
** ASSEMBLY
**
*Assembly, name=Assembly
**
*Instance, name=Part-1-1, part=Part-1
*Node
      1,         -15.,          15.,           0.
      2,         -15.,          20.,           0.
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*Element, type=C3D8R
  1,  18,  13,   2,   1,  64,  59,  48,  47
  2,   4,  14,  13,  18,  50,  60,  59,  64
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*Nset, nset=Set-1, generate
   1,  966,    1
*Elset, elset=Set-1, generate
   1,  520,    1
** Section: Section-1
*Solid Section, elset=Set-1, material=Material-1
,
*End Instance
**
*Nset, nset=Set-1, instance=Part-1-1, generate
 921,  966,    1
*Elset, elset=Set-1, instance=Part-1-1, generate
 495,  520,    1
*Nset, nset=Set-2, instance=Part-1-1, generate
  1,  46,   1
*Elset, elset=Set-2, instance=Part-1-1, generate
  1,  26,   1
*End Assembly
*Amplitude, name=Amp-1, definition=EQUALLY SPACED, fixed interval=1.
             0.,              1.
**
** MATERIALS
**
*Material, name=Material-1
*Elastic
210000., 0.3
*Plastic
120.,0.
200.,3.
**
** BOUNDARY CONDITIONS
**
** Name: BC-1 Type: Symmetry/Antisymmetry/Encastre
*Boundary
Set-1, ENCASTRE
** ----------------------------------------------------------------
**
** STEP: Step-1
**
*Step, name=Step-1, nlgeom=YES
*Static
0.1, 1., 1e-05, 1.
**
** BOUNDARY CONDITIONS
**
** Name: BC-2 Type: Displacement/Rotation
*Boundary, amplitude=Amp-1
Set-2, 1, 1
Set-2, 2, 2, -30.
Set-2, 3, 3
Set-2, 4, 4
Set-2, 5, 5
Set-2, 6, 6
**
** OUTPUT REQUESTS
**
*Restart, write, frequency=0
**
** FIELD OUTPUT: F-Output-1
**
*Output, field, variable=PRESELECT
**
** HISTORY OUTPUT: H-Output-1
**
*Output, history, variable=PRESELECT
*End Step
